# example script to calculate the vector from atom to voronoi centroid

units          metal
atom_style     atomic
dimension      3
boundary       p p p

read_restart      ./ZrCuAl-300xy-1.restart.7000000
reset_timestep 0


pair_style     eam/alloy

#newton         on
pair_coeff     * * ZrCuAl.lammps.eam Zr Cu Al

neighbor       2.0 bin
neigh_modify   every 4 delay 0 check yes

# For trilinic box, better to set a large cutoff to handle ghost atom correctly.
comm_modify cutoff 10.0
variable r atom (type==1)*1.55+(type==2)*1.35+(type==3)*1.25  # emperical radius from https://www.webelements.com

compute v1 all voro_vec/atom edge_histo 7 edge_threshold 0.5 face_threshold 0.001 radius v_r
thermo_style custom c_v1[*]

#                                                 dx       dy     dz     l
#dump    d1 all custom 1 dump.voro id type x y z c_v1[1] c_v1[2] c_v1[3] c_v1[4]
dump    d1 all custom 1 dump.voro id type x y z c_v1[*]
run  0
